// SBML level 3 version 1
// Created with https://github.com/matthiaskoenig/sbmlutils.

model metoprolol_kidney(Vext, Vki, Vurine, met_ext, metoh_ext, mam_ext, met_urine, metoh_urine, mam_urine)
  // Metoprolol kidney model
  // MET, MAM and METOH can be excreted in the urine via the kidneys. The renal filtration and excretion processes are not modeled in detail, but first order irreversible mass-action kinetics are used.
  // Terms of use
  // The content of this model has been carefully created in a manual research effort. This file has been created by Matthias König using sbmlutils . For questions contact koenigmx@hu-berlin.de.
  // Copyright © 2021 Matthias König.
  // This work is licensed under a Creative Commons Attribution 4.0 International License.
  // Redistribution and use of any part of this model, with or without modification, are permitted provided that the following conditions are met:
  // Redistributions of this SBML file must retain the above copyright notice, this list of conditions and the following disclaimer.
  // Redistributions in a different form must reproduce the above copyright notice, this list of conditions and the following disclaimer in the documentation and/or other materials provided with the distribution.
  // This model is distributed in the hope that it will be useful, but WITHOUT ANY WARRANTY; without even the implied warranty of MERCHANTABILITY or FITNESS FOR A PARTICULAR PURPOSE.
  // model units - substance: mmole, time: min, volume: litre, area: m2, length: metre, extent: mmole

  // Compartments:
  compartment Vext = 4 litre; Vext is "plasma";  // SBO:0000290 ncit:C13356 BTO:0000131
  compartment Vki = 1.5 litre; Vki is "kidney";  // SBO:0000290 FMA:7203 BTO:0000671 ncit:C12415
  compartment Vurine = 1 litre;  // SBO:0000290 FMA:12274 ncit:C13283 BTO:0001419

  // Species:
  species met_ext in Vext = 0; met_ext is "metoprolol (extern)";  // SBO:0000247 CHEBI:6904 ncit:C61845 inchikey:IUBSYMUCCVWXPE-UHFFFAOYSA-N
  species metoh_ext in Vext = 0; metoh_ext is "1-hydroxy metoprolol (extern)";  // SBO:0000247 CHEBI:165230 inchikey:OFRYBPCSEMMZHR-UHFFFAOYSA-N
  species mam_ext in Vext = 0; mam_ext is "metoprolol acid (extern)";  // SBO:0000247 CHEBI:83478 inchikey:PUQIRTNPJRFRCZ-UHFFFAOYSA-N
  substanceOnly species met_urine in Vurine = 0; met_urine is "metoprolol (urine)";  // SBO:0000247 CHEBI:6904 ncit:C61845 inchikey:IUBSYMUCCVWXPE-UHFFFAOYSA-N
  substanceOnly species metoh_urine in Vurine = 0; metoh_urine is "1-hydroxy metoprolol (urine)";  // SBO:0000247 CHEBI:165230 inchikey:OFRYBPCSEMMZHR-UHFFFAOYSA-N
  substanceOnly species mam_urine in Vurine = 0; mam_urine is "metoprolol acid (urine)";  // SBO:0000247 CHEBI:83478 inchikey:PUQIRTNPJRFRCZ-UHFFFAOYSA-N

  // Parameters:
  EX_k = 25 per_min; EX_k is "urinary excretion (kidney)";  // SBO:0000002
  METEX_f = 0.09677419 dimensionless; METEX_f is "fractional urinary contribution MET";  // SBO:0000002
  MAMEX_f = 0.7741935 dimensionless; MAMEX_f is "fractional urinary contribution MAM";  // SBO:0000002
  METOHEX_f = 0.1290323 dimensionless; METOHEX_f is "fractional urinary contribution MAM";  // SBO:0000002

  // Reactions:
  METEX: met_ext => met_urine; EX_k*METEX_f*Vki*met_ext; METEX is "metoprolol renal excretion";  // SBO:0000655
  MAMEX: mam_ext => mam_urine; EX_k*MAMEX_f*Vki*mam_ext; MAMEX is "metoprolol acid metabolite renal excretion";  // SBO:0000655
  METOHEX: metoh_ext => metoh_urine; EX_k*METOHEX_f*Vki*metoh_ext; METOHEX is "hydroxymetoprolol renal excretion";  // SBO:0000655

  // Unit definitions:
  unit g_per_mole = gram / mole; g_per_mole is "g/mole";
  unit litre_per_min = litre / (60 second); litre_per_min is "litre/min";
  unit m2 = metre^2; m2 is "meter^2";
  unit mM = 1e-3 mole / litre; mM is "mmole/liter";
  unit mg = 1e-3 gram;
  unit min = 60 second;
  unit mmole = 1e-3 mole;
  unit mmole_per_min = 1e-3 mole / (60 second); mmole_per_min is "mmole/min";
  unit mmole_per_min_l = 1e-3 mole / (60 second * litre); mmole_per_min_l is "mmole/min/liter";
  unit per_min = 1 / (60 second); per_min is "1/min";
end
