// SBML level 3 version 1
// Created with https://github.com/matthiaskoenig/sbmlutils.

model metoprolol_liver(Vext, Vli, met_ext, metoh_ext, mam_ext)
  // Metoprolol liver model
  // Metoprolol is metabolized 3 main routes: o-demethylation (approximately 65%), alpha-hydroxylation (10%) and n-dealkylation (10%) [Article:2222517][Article:30087611].
  // [Madani]
  // 20 % OH-M & 80% ODM
  // [Ruedesheim]
  // 40 % OH-M & 60% ODM
  // [Belpaire1998]
  // 40 % OH-M & 60% ODM
  // [Kim1991]
  // (R) 18 % OH-M & 82% ODM
  // (S) 30 % OH-M & 70% ODM
  // [Ruedesheim2020]
  // - Km(met, → OH-M & ODM) = 10 [8.8-12.4] µM
  // - Kcat(met, → OH-M & ODM) = 10 [7.5-12.3] 1/min
  // [Madani1999]
  // - Km(met → OH-M & ODM) = 26 +/- 9 µM (in liver)
  // [Yang2019]
  // - Km(met, → OH-M & ODM) = 11.31 ± 1.21 µM
  // [Kim1991]
  // - Km(met, → OH-M & ODM) = 20 [15.6-26.0] µM
  // CYP2D6 conversion metoprolol to oh-metoprolol
  // ~20 %
  // Terms of use
  // The content of this model has been carefully created in a manual research effort. This file has been created by Matthias König using sbmlutils . For questions contact koenigmx@hu-berlin.de.
  // Copyright © 2021 Matthias König.
  // This work is licensed under a Creative Commons Attribution 4.0 International License.
  // Redistribution and use of any part of this model, with or without modification, are permitted provided that the following conditions are met:
  // Redistributions of this SBML file must retain the above copyright notice, this list of conditions and the following disclaimer.
  // Redistributions in a different form must reproduce the above copyright notice, this list of conditions and the following disclaimer in the documentation and/or other materials provided with the distribution.
  // This model is distributed in the hope that it will be useful, but WITHOUT ANY WARRANTY; without even the implied warranty of MERCHANTABILITY or FITNESS FOR A PARTICULAR PURPOSE.
  // model units - substance: mmole, time: min, volume: litre, area: m2, length: metre, extent: mmole

  // Compartments:
  compartment Vext = 4 litre; Vext is "plasma";  // SBO:0000290 ncit:C13356 BTO:0000131
  compartment Vli = 1.5 litre; Vli is "liver";  // SBO:0000290 FMA:7197 BTO:0000759 ncit:C12392

  // Species:
  species met_ext in Vext = 0; met_ext is "metoprolol (extern)";  // SBO:0000247 CHEBI:6904 ncit:C61845 inchikey:IUBSYMUCCVWXPE-UHFFFAOYSA-N
  species metoh_ext in Vext = 0; metoh_ext is "1-hydroxy metoprolol (extern)";  // SBO:0000247 CHEBI:165230 inchikey:OFRYBPCSEMMZHR-UHFFFAOYSA-N
  species mam_ext in Vext = 0; mam_ext is "metoprolol acid (extern)";  // SBO:0000247 CHEBI:83478 inchikey:PUQIRTNPJRFRCZ-UHFFFAOYSA-N
  species met in Vli = 0; met is "metoprolol (liver)";  // SBO:0000247 CHEBI:6904 ncit:C61845 inchikey:IUBSYMUCCVWXPE-UHFFFAOYSA-N
  species metoh in Vli = 0; metoh is "1-hydroxy metoprolol (liver)";  // SBO:0000247 CHEBI:165230 inchikey:OFRYBPCSEMMZHR-UHFFFAOYSA-N
  species mam in Vli = 0; mam is "metoprolol acid (liver)";  // SBO:0000247 CHEBI:83478 inchikey:PUQIRTNPJRFRCZ-UHFFFAOYSA-N

  // Parameters:
  Mr_met = 267.36394 g_per_mole; Mr_met is "Molecular weight met [g/mole]";  // SBO:0000647
  MET_Vmax = 0.075 mmole_per_min_l; MET_Vmax is "Vmax metoprolol conversion";  // SBO:0000186
  Xmet has mg; Xmet is "metoprolol amount";
  METIM_f = 100 dimensionless; METIM_f is "scaling metoprolol import";  // SBO:0000002
  METIM_Km_mem = 0.015 mM; METIM_Km_mem is "Km metoprolol import";  // SBO:0000027
  METOHEX_f = 100 dimensionless; METOHEX_f is "scaling hydroxymetoprolol export";  // SBO:0000002
  METOHEX_Km_metoh = 0.015 mM; METOHEX_Km_metoh is "Km hydroxymetoprolol export";  // SBO:0000027
  MAMEX_f = 100 dimensionless; MAMEX_f is "scaling MAM export";  // SBO:0000002
  MAMEX_Km_mam = 0.015 mM; MAMEX_Km_mam is "Km MAM export";  // SBO:0000027
  METOH_f = 0.1666667 dimensionless; METOH_f is "scaling MET -> METOH";  // SBO:0000027
  CYP2D6_Km_met = 0.015 mM; CYP2D6_Km_met is "Km MET -> METOH";  // SBO:0000027
  MAM_f = 0.6666667 dimensionless; MAM_f is "scaling MET -> MAM";  // SBO:0000002
  MISC_f = 0.1666667 dimensionless; MISC_f is "scaling MET ->";  // SBO:0000002

  // Assignment rules:
  Xmet := met*Vli*Mr_met;

  // Reactions:
  METIM: met_ext => met; MET_Vmax*METIM_f*Vli*met_ext/(METIM_Km_mem + met_ext); METIM is "metoprolol import";  // SBO:0000655
  METOHEX: metoh => metoh_ext; MET_Vmax*METOHEX_f*Vli*metoh/(METOHEX_Km_metoh + metoh); METOHEX is "hydroxymetoprolol export";  // SBO:0000655
  MAMEX: mam => mam_ext; MET_Vmax*MAMEX_f*Vli*mam/(MAMEX_Km_mam + mam); MAMEX is "MAM export";  // SBO:0000655
  METOH: met => metoh; MET_Vmax*METOH_f*Vli*met/(CYP2D6_Km_met + met); METOH is "MET to METOH conversion";  // SBO:0000176
  // CYP2D6 conversion metoprolol to metoprolol acid metabolite (MAM) ~80 %
  MAM: met => mam; MET_Vmax*MAM_f*Vli*met/(CYP2D6_Km_met + met); MAM is "MET to MAM conversion";  // SBO:0000176
  // Around 20% cannot be recovered in urine; probably alternative products not tracking this in the model (assuming also CYP2D6).
  MISC: met => ; MET_Vmax*MISC_f*Vli*met/(CYP2D6_Km_met + met); MISC is "MET conversion";  // SBO:0000176

  // Unit definitions:
  unit g_per_mole = gram / mole; g_per_mole is "g/mole";
  unit litre_per_min = litre / (60 second); litre_per_min is "litre/min";
  unit m2 = metre^2; m2 is "meter^2";
  unit mM = 1e-3 mole / litre; mM is "mmole/liter";
  unit mg = 1e-3 gram;
  unit min = 60 second;
  unit mmole = 1e-3 mole;
  unit mmole_per_min = 1e-3 mole / (60 second); mmole_per_min is "mmole/min";
  unit mmole_per_min_l = 1e-3 mole / (60 second * litre); mmole_per_min_l is "mmole/min/liter";
  unit per_min = 1 / (60 second); per_min is "1/min";
end
